<?xml version="1.0"?>

<?xml-stylesheet type="text/xsl" href="http://jsbsim.sourceforge.net/JSBSim.xsl"?>

<fdm_config name="767-300JWocky" version="2.0" release="ALPHA"
   xmlns:xsi="http://www.w3.org/2001/XMLSchema-instance"
   xsi:noNamespaceSchemaLocation="http://jsbsim.sourceforge.net/JSBSim.xsd">

	<fileheader>
		<author> Aeromatic v 0.95 </author>
		<filecreationdate>2015-03-26</filecreationdate>
		<version>$Revision: 1.15 $</version>
		<description> Models a 767-300JWocky. </description>
	</fileheader>

	<!--
		File:     767-300JWocky.xml
		Inputs:
			name:          767-300JWocky
			type:          two-engine transonic transport
			max weight:    412000 lb (This is actually max taxi weight?)
			wing span:     156.1 ft
			length:        180.25 ft
			wing area:     3050 sq-ft
			gear type:     tricycle
			retractable?:  yes
			# engines:     2
			engine type:   turbine
			engine layout: wings
			yaw damper?    yes
		Outputs:
			wing loading:  135.08 lb/sq-ft
			payload:       99436.0 lbs
			CL-alpha:      4.4 per radian
			CL-0:          0.2
			CL-max:        1.2
			CD-0:          0.02
			K:             0.043

	-->

	<metrics>
		<wingarea  unit="FT2"> 3050.00 </wingarea>
		<wingspan  unit="FT" >  156.10 </wingspan>
		<wing_incidence>          1.50 </wing_incidence>
		<chord     unit="FT" >   19.54 </chord>
		<htailarea unit="FT2">  762.50 </htailarea>
		<htailarm  unit="FT" >   48.00 </htailarm>
		<vtailarea unit="FT2">  610.00 </vtailarea>
		<vtailarm  unit="FT" >   52.00 </vtailarm>
		<location name="AERORP" unit="IN">
		<x>   0.00 </x>
		<y>   0.00 </y>
		<z>   0.00 </z>
		</location>
			<location name="EYEPOINT" unit="IN">
			<x> 151.41 </x>
			<y> -30.00 </y>
			<z>  70.00 </z>
		</location>
		<location name="VRP" unit="IN">
			<x>-1081.50</x>
			<y>0</y>
			<z>150</z>
		</location>
	</metrics>

	<mass_balance>
		<ixx unit="SLUG*FT2">   2346384 </ixx>
		<iyy unit="SLUG*FT2">   7228216 </iyy>
		<izz unit="SLUG*FT2">   9220445 </izz>
		<emptywt unit="LBS" >    198440 </emptywt>
		<location name="CG" unit="IN">
			<x> -25.00 </x>
			<y>   0.00 </y>
			<z> -54.07 </z>
		</location>

		<pointmass name="Cockpit Crew">
			<description>Careful, can be overloaded! Different configurations for different missions!</description>
			<weight unit="LBS">  440.00 </weight>
			<location name="CockpitCrew" unit="IN">
				<x> -1000.00 </x>
				<y>     0.00 </y>
				<z>   -44.07 </z>
			</location>
		</pointmass>

		<pointmass name="Cabin Crew">
			<description>Careful, can be overloaded! Different configurations for different missions!</description>
			<weight unit="LBS">  1540.00 </weight>
			<location name="CabinCrew" unit="IN">
				<x>     0.00 </x>
				<y>     0.00 </y>
				<z>   -44.07 </z>
			</location>
		</pointmass>

		<pointmass name="First Class">
			<description>Careful, can be overloaded! Different configurations for different missions!</description>
			<weight unit="LBS"> 0.00 </weight>
			<location name="FirstClass" unit="IN">
				<x>  -600.00 </x>
				<y>     0.00 </y>
				<z>   -44.07 </z>
			</location>
		</pointmass>

		<pointmass name="Second Class">
			<description>Careful, can be overloaded! Different configurations for different missions!</description>
			<weight unit="LBS"> 0.00 </weight>
			<location name="SecondClass" unit="IN">
				<x>   -200.00 </x>
				<y>     0.00 </y>
				<z>   -44.07 </z>
			</location>
		</pointmass>

		<pointmass name="Coach Class">
			<description>Careful, can be overloaded! Different configurations for different missions!</description>
			<weight unit="LBS"> 0.00 </weight>
			<location name="CoachClass" unit="IN">
				<x>  	300.00 </x>
				<y>     0.00 </y>
				<z>   -54.07 </z>
			</location>
		</pointmass>

		<pointmass name="Fwd. Cargo">
			<description>Careful, can be overloaded! Different configurations for different missions!</description>
			<weight unit="LBS"> 0.00 </weight>
			<location name="FwdCargo" unit="IN">
				<x>  	-600.00 </x>
				<y>     0.00 </y>
				<z>   -64.00 </z>
			</location>
		</pointmass>

		<pointmass name="Aft. Cargo">
			<description>Careful, can be overloaded! Different configurations for different missions!</description>
			<weight unit="LBS"> 0.00 </weight>
			<location name="AftCargo" unit="IN">
				<x>  	350.00 </x>
				<y>     0.00 </y>
				<z>   -64.00 </z>
			</location>
		</pointmass>

		<pointmass name="Bulk Cargo">
			<description>Careful, can be overloaded! Different configurations for different missions!</description>
			<weight unit="LBS"> 0.00 </weight>
			<location name="BulkCargo" unit="IN">
				<x>  	880.00 </x>
				<y>     0.00 </y>
				<z>   -64.00 </z>
			</location>
		</pointmass>

	</mass_balance>

	<ground_reactions>

		<contact type="BOGEY" name="NOSE">
			<location unit="IN">
				<x> -902.50 </x>
				<y>    0.00 </y>
				<z>  -63.00 </z>
			</location>
			<static_friction>  0.80 </static_friction>
			<dynamic_friction> 0.50 </dynamic_friction>
			<rolling_friction> 0.02 </rolling_friction>
			<spring_coeff unit="LBS/FT">      247200.00 </spring_coeff>
			<damping_coeff unit="LBS/FT/SEC"> 206000.00 </damping_coeff>
			<damping_coeff_rebound unit="LBS/FT/SEC">150000</damping_coeff_rebound>
			<max_steer unit="DEG"> 70.00 </max_steer>
			<brake_group>NONE</brake_group>
			<retractable>1</retractable>
		</contact>

		<contact type="BOGEY" name="LEFT_MAIN">
			<location unit="IN">
				<x>   65.50 </x>
				<y> -183.00 </y>
				<z>  -63.00 </z>
			</location>
			<static_friction>  0.80 </static_friction>
			<dynamic_friction> 0.50 </dynamic_friction>
			<rolling_friction> 0.02 </rolling_friction>
			<spring_coeff unit="LBS/FT">      618000.00 </spring_coeff>
			<damping_coeff unit="LBS/FT/SEC"> 206000.00 </damping_coeff>
			<damping_coeff_rebound unit="LBS/FT/SEC">150000</damping_coeff_rebound>
			<max_steer unit="DEG">0</max_steer>
			<brake_group>LEFT</brake_group>
			<retractable>1</retractable>
		</contact>

		<contact type="BOGEY" name="RIGHT_MAIN">
			<location unit="IN">
				<x>   65.50 </x>
				<y>  183.00 </y>
				<z>  -63.00 </z>
			</location>
			<static_friction>  0.80 </static_friction>
			<dynamic_friction> 0.50 </dynamic_friction>
			<rolling_friction> 0.02 </rolling_friction>
			<spring_coeff unit="LBS/FT">      618000.00 </spring_coeff>
			<damping_coeff unit="LBS/FT/SEC"> 206000.00 </damping_coeff>
			<damping_coeff_rebound unit="LBS/FT/SEC">150000</damping_coeff_rebound>
			<max_steer unit="DEG">0</max_steer>
			<brake_group>RIGHT</brake_group>
			<retractable>1</retractable>
		</contact>

		<!-- contact type="STRUCTURE" name="LEFT_WING">
			<location unit="IN">
				<x>   0.00 </x>
				<y> -78.05 </y>
				<z> -54.07 </z>
			</location>
			<static_friction>  1.00 </static_friction>
			<dynamic_friction> 1.00 </dynamic_friction>
			<spring_coeff unit="LBS/FT">      412000.00 </spring_coeff>
			<damping_coeff unit="LBS/FT/SEC"> 412000.00 </damping_coeff>
		</contact -->

		<!-- contact type="STRUCTURE" name="RIGHT_WING">
			<location unit="IN">
				<x>   0.00 </x>
				<y>  78.05 </y>
				<z> -54.07 </z>
			</location>
			<static_friction>  1.00 </static_friction>
			<dynamic_friction> 1.00 </dynamic_friction>
			<spring_coeff unit="LBS/FT">      412000.00 </spring_coeff>
			<damping_coeff unit="LBS/FT/SEC"> 412000.00 </damping_coeff>
		</contact -->

	</ground_reactions>

	<propulsion>

		<engine file="PW4062">
			<location unit="IN">
				<x> -267.50 </x>
				<y> -312.20 </y>
				<z>  -40.00 </z>
			</location>
			<orient unit="DEG">
				<pitch> 0.00 </pitch>
				<roll>  0.00 </roll>
				<yaw>   0.00 </yaw>
			</orient>
			<feed>1</feed>
			<feed>0</feed>
			<feed>2</feed>
			<thruster file="direct">
				<location unit="IN">
					<x> -190.90 </x>
					<y> -312.20 </y>
					<z> -40.00 </z>
				</location>
				<orient unit="DEG">
					<pitch> 0.00 </pitch>
					<roll>  0.00 </roll>
					<yaw>   0.00 </yaw>
				</orient>
			</thruster>
		</engine>

		<engine file="PW4062">
			<location unit="IN">
				<x>-267.50 </x>
				<y> 312.20 </y>
				<z> -40.00 </z>
			</location>
			<orient unit="DEG">
				<pitch> 0.00 </pitch>
				<roll>  0.00 </roll>
				<yaw>   0.00 </yaw>
			</orient>
			<feed>1</feed>
			<feed>0</feed>
			<feed>2</feed>
			<thruster file="direct">
				<location unit="IN">
					<x>-190.90 </x>
					<y> 312.20 </y>
					<z> -40.00 </z>
				</location>
				<orient unit="DEG">
					<pitch> 0.00 </pitch>
					<roll>  0.00 </roll>
					<yaw>   0.00 </yaw>
				</orient>
			</thruster>
		</engine>

		<tank type="FUEL" number="0">
			<location unit="IN">
				<x>  -10.00 </x>
				<y> -150.00 </y>
				<z>  -54.07 </z>
			</location>
			<priority>1</priority>
			<capacity unit="LBS"> 55457.75 </capacity>
			<contents unit="LBS"> 0.00 </contents>
		</tank>

		<tank type="FUEL" number="1">
			<location unit="IN">
				<x>    0.00 </x>
				<y>    0.00 </y>
				<z>  -54.07 </z>
			</location>
			<priority>0</priority>
			<capacity unit="LBS"> 50000.00 </capacity>
			<contents unit="LBS"> 0.00 </contents>
		</tank>

		<tank type="FUEL" number="2">
			<location unit="IN">
				<x>  -10.00 </x>
				<y>  150.00 </y>
				<z>  -54.07 </z>
			</location>
			<priority>1</priority>
			<capacity unit="LBS"> 55457.75 </capacity>
			<contents unit="LBS"> 0.00 </contents>
		</tank>

	</propulsion>

	<system file="NWS"/>
	<system file="Flaps"/>
	<system file="pushback"/>

	<flight_control name="FCS: 767-Workshop">

		<channel name="Pitch">

			<summer name="Pitch Trim Sum">
				<input>fcs/elevator-cmd-norm</input>
				<input>fcs/pitch-trim-cmd-norm</input>
				<clipto>
					<min> -1 </min>
					<max>  1 </max>
				</clipto>
			</summer>

			<aerosurface_scale name="Elevator Control">
				<input>fcs/pitch-trim-sum</input>
				<range>
					<min> -0.35 </min>
					<max>  0.35 </max>
				</range>
				<output>fcs/elevator-pos-rad</output>
			</aerosurface_scale>

			<aerosurface_scale name="elevator normalization">
				<input>fcs/elevator-pos-rad</input>
				<domain>
					<min> -0.35 </min>
					<max>  0.35 </max>
				</domain>
				<range>
					<min> -1 </min>
					<max>  1 </max>
				</range>
				<output>fcs/elevator-pos-norm</output>
			</aerosurface_scale>

		</channel>

		<channel name="Roll">

			<summer name="Roll Trim Sum">
				<input>fcs/aileron-cmd-norm</input>
				<input>fcs/roll-trim-cmd-norm</input>
				<clipto>
					<min> -1 </min>
					<max>  1 </max>
				</clipto>
			</summer>

			<aerosurface_scale name="Left Aileron Control">
				<input>fcs/roll-trim-sum</input>
				<range>
					<min> -0.35 </min>
					<max>  0.35 </max>
				</range>
				<output>fcs/left-aileron-pos-rad</output>
			</aerosurface_scale>

			<aerosurface_scale name="Right Aileron Control">
				<input>fcs/roll-trim-sum</input>
				<range>
					<min> -0.35 </min>
					<max>  0.35 </max>
				</range>
				<output>fcs/right-aileron-pos-rad</output>
			</aerosurface_scale>

			<aerosurface_scale name="left aileron normalization">
				<input>fcs/left-aileron-pos-rad</input>
				<domain>
					<min> -0.35 </min>
					<max>  0.35 </max>
				</domain>
				<range>
					<min> -1 </min>
					<max>  1 </max>
				</range>
				<output>fcs/left-aileron-pos-norm</output>
			</aerosurface_scale>

			<aerosurface_scale name="right aileron normalization">
				<input>fcs/right-aileron-pos-rad</input>
				<domain>
					<min> -0.35 </min>
					<max>  0.35 </max>
				</domain>
				<range>
					<min> -1 </min>
					<max>  1 </max>
				</range>
				<output>fcs/right-aileron-pos-norm</output>
			</aerosurface_scale>

		</channel>

		<property value="1">fcs/yaw-damper-enable</property>

		<channel name="Yaw">

			<summer name="Rudder Command Sum">
				<input>fcs/rudder-cmd-norm</input>
				<input>fcs/yaw-trim-cmd-norm</input>
				<clipto>
					<min> -1 </min>
					<max>  1 </max>
				</clipto>
			</summer>

			<scheduled_gain name="Yaw Damper Rate">
				<input>velocities/r-aero-rad_sec</input>
				<table>
					<independentVar lookup="row">velocities/ve-kts</independentVar>
					<tableData>
						30     0.00
						60     2.00
					</tableData>
				</table>
				<gain>fcs/yaw-damper-enable</gain>
			</scheduled_gain>

			<summer name="Rudder Sum">
				<input>fcs/rudder-command-sum</input>
				<input>fcs/yaw-damper-rate</input>
				<clipto>
					<min> -1.1 </min>
					<max>  1.1 </max>
				</clipto>
			</summer>

			<aerosurface_scale name="Rudder Control">
				<input>fcs/rudder-sum</input>
				<domain>
					<min> -1.1 </min>
					<max>  1.1 </max>
				</domain>
				<range>
					<min> -0.35 </min>
					<max>  0.35 </max>
				</range>
				<output>fcs/rudder-pos-rad</output>
			</aerosurface_scale>

			<aerosurface_scale name="rudder normalization">
				<input>fcs/rudder-pos-rad</input>
				<domain>
					<min> -0.35 </min>
					<max>  0.35 </max>
				</domain>
				<range>
					<min> -1 </min>
					<max>  1 </max>
				</range>
				<output>fcs/rudder-pos-norm</output>
			</aerosurface_scale>

		</channel>

		<channel name="Flaps">

			<kinematic name="Flaps Control">
				<input>systems/flap-cmd-norm2</input>
				<traverse>
					<setting>
						<position>  0.0000 </position>
						<time>      0.0000 </time>
					</setting>
					<setting>
						<position>  32.0000 </position>
						<time>      18 </time>
					</setting>
				</traverse>
				<output>fcs/flap-pos-factor</output>
			</kinematic>

			<aerosurface_scale name="flap normalization">
				<input>fcs/flap-pos-factor</input>
				<domain>
					<min>  0 </min>
					<max> 32 </max>
				</domain>
				<range>
					<min> 0 </min>
					<max> 1 </max>
				</range>
				<output>fcs/flap-pos-norm</output>
			</aerosurface_scale>

			<aerosurface_scale name="flap_normalization2">
				<input>fcs/flap-pos-norm</input>
				<domain>
					<min>  0 </min>
					<max>  1 </max>
				</domain>
				<range>
					<min> 0 </min>
					<max> 32 </max>
				</range>
				<output>fcs/flap-pos-deg</output>
			</aerosurface_scale>

		</channel>

		<channel name="Slats">

			<kinematic name="Slats Control">
				<input>systems/slat-cmd-norm2</input>
				<traverse>
					<setting>
						<position> 0.0</position>
						<time>	   3 </time>
					</setting>
					<setting>
						<position> 0.1200</position>
						<time>	   3 </time>
					</setting>
					<setting>
						<position> 0.3000</position>
						<time>	   3 </time>
					</setting>
					<setting>
						<position> 0.5000</position>
						<time>     3 </time>
					</setting>
					<setting>
						<position> 0.6000</position>
						<time>	   3 </time>
					</setting>
					<setting>
						<position> 0.8000</position>
						<time>     3 </time>
					</setting>
					<setting>
						<position> 1.0000</position>
						<time>     3 </time>
					</setting>
				</traverse>
				<output>fcs/slat-pos-factor</output>
			</kinematic>

			<aerosurface_scale name="slat_normalization">
				<input>fcs/slat-pos-factor</input>
				<domain>
					<min>  0 </min>
					<max> 32 </max>
				</domain>
				<range>
					<min> 0 </min>
					<max> 1 </max>
				</range>
				<output>fcs/slat-pos-norm</output>
			</aerosurface_scale>

			<aerosurface_scale name="slat_normalization2">
				<input>fcs/slat-pos-factor</input>
				<domain>
					<min> 0 </min>
					<max> 1 </max>
				</domain>
				<range>
					<min> 0 </min>
					<max> 32 </max>
				</range>
				<output>fcs/slat-pos-deg</output>
			</aerosurface_scale>

		</channel>

		<channel name="Landing Gear">

			<kinematic name="Gear Control">
				<input>gear/gear-cmd-norm</input>
				<traverse>
					<setting>
						<position> 0 </position>
						<time>     0 </time>
					</setting>
					<setting>
						<position> 1 </position>
						<time>     5 </time>
					</setting>
				</traverse>
				<output>gear/gear-pos-norm</output>
			</kinematic>

		</channel>

		<channel name="Speedbrake">

			<kinematic name="Speedbrake Control">
				<input>fcs/speedbrake-cmd-norm</input>
				<traverse>
					<setting>
						<position> 0 </position>
						<time>     0 </time>
					</setting>
					<setting>
						<position> 1 </position>
						<time>     1 </time>
					</setting>
				</traverse>
				<output>fcs/speedbrake-pos-norm</output>
			</kinematic>

		</channel>

	</flight_control>

	<aerodynamics>

		<axis name="LIFT">

			<function name="aero/force/Lift_alpha">
				<description>Lift due to alpha</description>
				<product>
					<property>aero/qbar-psf</property>
					<property>metrics/Sw-sqft</property>
					<table>
						<independentVar lookup="row">aero/alpha-rad</independentVar>
						<tableData>
							-0.20 -0.880
							 0.00  0.500
							 0.23  1.500
							 0.60  0.900
						</tableData>
					</table>
				</product>
			</function>

			<function name="aero/force/Lift_flap">
				<description>Delta Lift due to flaps</description>
				<product>
					<property>aero/qbar-psf</property>
					<property>metrics/Sw-sqft</property>
					<property>fcs/flap-pos-deg</property>
					<value> 0.05000 </value>
				</product>
			</function>

			<function name="aero/force/Lift_speedbrake">
				<description>Delta Lift due to speedbrake</description>
				<product>
					<property>aero/qbar-psf</property>
					<property>metrics/Sw-sqft</property>
					<property>fcs/speedbrake-pos-norm</property>
					<value>-0.1</value>
				</product>
			</function>

			<function name="aero/force/Lift_elevator">
				<description>Lift due to Elevator Deflection</description>
				<product>
					<property>aero/qbar-psf</property>
					<property>metrics/Sw-sqft</property>
					<property>fcs/elevator-pos-rad</property>
					<value>0.20</value>
				</product>
			</function>

		</axis>

		<axis name="DRAG">

			<function name="aero/force/Drag_basic">
				<description>Drag at zero lift</description>
				<product>
					<property>aero/qbar-psf</property>
					<property>metrics/Sw-sqft</property>
					<table>
						<independentVar lookup="row">aero/alpha-rad</independentVar>
						<tableData>
							-1.57    1.500
							-0.26    0.026
							 0.00    0.020
							 0.26    0.026
							 1.57    1.500
						</tableData>
					</table>
				</product>
			</function>

			<function name="aero/force/Drag_induced">
				<description>Induced drag</description>
				<product>
					<property>aero/qbar-psf</property>
					<property>metrics/Sw-sqft</property>
					<property>aero/cl-squared</property>
					<value>0.043</value>
				</product>
			</function>

			<function name="aero/force/Drag_mach">
				<description>Drag due to mach</description>
				<product>
					<property>aero/qbar-psf</property>
					<property>metrics/Sw-sqft</property>
					<table>
						<independentVar lookup="row">velocities/mach</independentVar>
						<tableData>
							 0.00      0.000
							 0.79      0.000
							 1.10      0.023
							 1.80      0.015
						</tableData>
					</table>
				</product>
			</function>

			<function name="aero/force/Drag_flap">
				<description>Drag due to flaps</description>
				<product>
					<property>aero/qbar-psf</property>
					<property>metrics/Sw-sqft</property>
					<property>fcs/flap-pos-deg</property>
					<value> 0.00197 </value>
				</product>
			</function>

			<function name="aero/force/Drag_gear">
				<description>Drag due to gear</description>
				<product>
					<property>aero/qbar-psf</property>
					<property>metrics/Sw-sqft</property>
					<property>gear/gear-pos-norm</property>
					<value>0.025</value>
				</product>
			</function>

			<function name="aero/force/Drag_speedbrake">
				<description>Drag due to speedbrakes</description>
				<product>
					<property>aero/qbar-psf</property>
					<property>metrics/Sw-sqft</property>
					<property>fcs/speedbrake-pos-norm</property>
					<value>0.02</value>
				</product>
			</function>

			<function name="aero/force/Drag_beta">
				<description>Drag due to sideslip</description>
				<product>
					<property>aero/qbar-psf</property>
					<property>metrics/Sw-sqft</property>
					<table>
						<independentVar lookup="row">aero/beta-rad</independentVar>
						<tableData>
							-1.57    1.230
							-0.26    0.050
							 0.00    0.000
							 0.26    0.050
							 1.57    1.230
						</tableData>
					</table>
				</product>
			</function>

			<function name="aero/force/Drag_elevator">
				<description>Drag due to Elevator Deflection</description>
				<product>
					<property>aero/qbar-psf</property>
					<property>metrics/Sw-sqft</property>
					<abs><property>fcs/elevator-pos-norm</property></abs>
					<value>0.04</value>
				</product>
			</function>

		</axis>

		<axis name="SIDE">

			<function name="aero/force/Side_beta">
				<description>Side force due to beta</description>
				<product>
					<property>aero/qbar-psf</property>
					<property>metrics/Sw-sqft</property>
					<property>aero/beta-rad</property>
					<value>-1</value>
				</product>
			</function>

		</axis>

		<axis name="ROLL">

			<function name="aero/moment/Roll_beta">
				<description>Roll moment due to beta</description>
				<product>
					<property>aero/qbar-psf</property>
					<property>metrics/Sw-sqft</property>
					<property>metrics/bw-ft</property>
					<property>aero/beta-rad</property>
					<value>-0.1</value>
				</product>
			</function>

			<function name="aero/moment/Roll_damp">
				<description>Roll moment due to roll rate</description>
				<product>
					<property>aero/qbar-psf</property>
					<property>metrics/Sw-sqft</property>
					<property>metrics/bw-ft</property>
					<property>aero/bi2vel</property>
					<property>velocities/p-aero-rad_sec</property>
					<value>-0.4</value>
				</product>
			</function>

			<function name="aero/moment/Roll_yaw">
				<description>Roll moment due to yaw rate</description>
				<product>
					<property>aero/qbar-psf</property>
					<property>metrics/Sw-sqft</property>
					<property>metrics/bw-ft</property>
					<property>aero/bi2vel</property>
					<property>velocities/r-aero-rad_sec</property>
					<value>0.15</value>
				</product>
			</function>

			<function name="aero/moment/Roll_aileron">
				<description>Roll moment due to aileron</description>
				<product>
					<property>aero/qbar-psf</property>
					<property>metrics/Sw-sqft</property>
					<property>metrics/bw-ft</property>
					<property>fcs/left-aileron-pos-rad</property>
					<value>0.1</value>
				</product>
			</function>

			<function name="aero/moment/Roll_rudder">
				<description>Roll moment due to rudder</description>
				<product>
					<property>aero/qbar-psf</property>
					<property>metrics/Sw-sqft</property>
					<property>metrics/bw-ft</property>
					<property>fcs/rudder-pos-rad</property>
					<value>0.01</value>
				</product>
			</function>

		</axis>

		<axis name="PITCH">

			<function name="aero/moment/Pitch_alpha">
				<description>Pitch moment due to alpha</description>
				<product>
					<property>aero/qbar-psf</property>
					<property>metrics/Sw-sqft</property>
					<property>metrics/cbarw-ft</property>
					<property>aero/alpha-rad</property>
					<value>-0.6</value>
				</product>
			</function>

			<function name="aero/moment/Pitch_elevator">
				<description>Pitch moment due to elevator</description>
				<product>
					<property>aero/qbar-psf</property>
					<property>metrics/Sw-sqft</property>
					<property>metrics/cbarw-ft</property>
					<property>fcs/elevator-pos-rad</property>
					<table>
						<independentVar lookup="row">velocities/mach</independentVar>
						<tableData>
							0.0     -1.200
							2.0     -0.300
						</tableData>
					</table>
				</product>
			</function>

			<function name="aero/moment/Pitch_damp">
				<description>Pitch moment due to pitch rate</description>
				<product>
					<property>aero/qbar-psf</property>
					<property>metrics/Sw-sqft</property>
					<property>metrics/cbarw-ft</property>
					<property>aero/ci2vel</property>
					<property>velocities/q-aero-rad_sec</property>
					<value>-17</value>
				</product>
			</function>

			<function name="aero/moment/Pitch_alphadot">
				<description>Pitch moment due to alpha rate</description>
				<product>
					<property>aero/qbar-psf</property>
					<property>metrics/Sw-sqft</property>
					<property>metrics/cbarw-ft</property>
					<property>aero/ci2vel</property>
					<property>aero/alphadot-rad_sec</property>
					<value>-6</value>
				</product>
			</function>

		</axis>

		<axis name="YAW">

			<function name="aero/moment/Yaw_beta">
				<description>Yaw moment due to beta</description>
				<product>
					<property>aero/qbar-psf</property>
					<property>metrics/Sw-sqft</property>
					<property>metrics/bw-ft</property>
					<property>aero/beta-rad</property>
					<value>0.12</value>
				</product>
			</function>

			<function name="aero/moment/Yaw_damp">
				<description>Yaw moment due to yaw rate</description>
				<product>
					<property>aero/qbar-psf</property>
					<property>metrics/Sw-sqft</property>
					<property>metrics/bw-ft</property>
					<property>aero/bi2vel</property>
					<property>velocities/r-aero-rad_sec</property>
					<value>-0.15</value>
				</product>
			</function>

			<function name="aero/moment/Yaw_rudder">
				<description>Yaw moment due to rudder</description>
				<product>
					<property>aero/qbar-psf</property>
					<property>metrics/Sw-sqft</property>
					<property>metrics/bw-ft</property>
					<property>fcs/rudder-pos-rad</property>
					<value>-0.1</value>
				</product>
			</function>

			<function name="aero/moment/Yaw_aileron">
				<description>Adverse yaw</description>
				<product>
					<property>aero/qbar-psf</property>
					<property>metrics/Sw-sqft</property>
					<property>metrics/bw-ft</property>
					<property>fcs/left-aileron-pos-rad</property>
					<value>0</value>
				</product>
			</function>

		</axis>

	</aerodynamics>

	<external_reactions>
		<force name="pushback" frame="BODY">
			<location unit="IN">
				<x> -980.19 </x>
				<y>    0.00 </y>
				<z>  -63.00 </z>
			</location>
			<direction>
				<x>1</x>
				<y>0</y>
				<z>0</z>
			</direction>
		</force>
	</external_reactions>

</fdm_config>
