<?xml version="1.0"?>
<!--
  File:     PW4062.xml
  Author:   Liam Gathercole / Peter Brendt

  Inputs:
    name:           Pratt & Whitney PW 4000-94 with originally 64k lbs thrust (updated in the 90s)
    type:           turbine
    thrust:         63300 lb
    augmented?      no
    injected?       no
-->

<turbine_engine name="my_engine">
	<milthrust>   63300.0 </milthrust>
	<bypassratio>     5.0 </bypassratio>
	<tsfc>            0.25 </tsfc>
	<bleed>           0.03</bleed>
	<idlen1>         30.0 </idlen1>
	<idlen2>         60.0 </idlen2>
	<maxn1>         110.0 </maxn1>
	<maxn2>         110.0 </maxn2>
	<augmented>         0 </augmented>
	<injected>          0 </injected>

	<function name="IdleThrust">
		<table>
			<independentVar lookup="row">velocities/mach</independentVar>
			<independentVar lookup="column">atmosphere/density-altitude</independentVar>
			<tableData>
					-10000	     0	 10000	 20000	 30000	 40000	 50000	 60000
				0.0000	0.0430	0.0488	0.0528	0.0694	0.0899	0.1183	0.1467	0.0000
				0.2000  0.0500  0.0501  0.0335  0.0544  0.0797  0.1049  0.1342  0.0000
				0.4000  0.0040  0.0047  0.0020  0.0272  0.0595  0.0891  0.1203  0.0000
				0.6000  0.0000  0.0000  0.0000  0.0000  0.0276  0.0718  0.1073  0.0000
				0.8000  0.0000  0.0000  0.0000  0.0000  0.0474  0.0868  0.0900  0.0000
				1.0000  0.0000	0.0000	0.0000	0.0000	0.0000	0.0552  0.0800  0.0000
			</tableData>
		</table>
	</function>

	<function name="MilThrust">
		<table>
			<independentVar lookup="row">velocities/mach</independentVar>
			<independentVar lookup="column">atmosphere/density-altitude</independentVar>
			<tableData>
					-10000	      0	  10000	  20000	  30000	  40000	  50000	  60000
				0.0000   1.2600  1.0000  0.9400  0.7340  0.5720  0.4410  0.3890  0.0000
				0.2000   1.1710  0.9340  0.8970  0.7060  0.5550  0.4310  0.3830  0.0000
				0.4000   1.1500  0.9210  0.8920  0.7060  0.5570  0.4330  0.3850  0.0000
				0.6000   1.1810  0.9510  0.9210  0.7320  0.5780  0.4480  0.3940  0.0000
				0.8000   1.2580  1.0200  0.9820  0.7820  0.6170  0.4750  0.4200  0.0000
				1.0000   1.3690  1.1200  1.0710  0.8510  0.6750  0.5150  0.4450  0.0000
				1.2000   1.4850  1.2300  1.1750  0.9440  0.7450  0.5640  0.4750  0.0000
				1.4000   1.5941  1.3400  1.2860  1.0450  0.8280  0.6240  0.5330  0.0000
			</tableData>
		</table>
	</function>

</turbine_engine>
